// COMSOL Multiphysics 5.3.1.201 model "projekt_comsol_kapiaca_woda.mph"
// Outline of the model tree

Geometry
  geom1 "Geometry 1" (2D, length unit m)
    c1: Circle
    pt1: Point
    fin: Finalize "Form Union"

Physics
  lpeq: LaplaceEquation on all domains
    dependent variable u
    leq1: LaplaceEquation (default)
    zflx1: ZeroFluxBoundary "Zero Flux 1" (default)
    init1: init "Initial Values 1" (default)
    dir1: DirichletBoundary "Dirichlet Boundary Condition 1" on all boundaries | r = 0
    ptsrc1: PointSourceTerm "Point Source 1" on points 3 | f = 1

Mesh
  mesh1 "Mesh 1" (physics-controlled)
  adaptmesh1 "Level 1 Refined Mesh 1"
    size: MeshSizeDefault | hmax = 0.134; hmin = 6.0E-4; hcurve = 0.3; hgrad = 1.3
    copy1: Copy | counter = 1; mesh = mesh1
    adap1: Adapt on entire geometry | solution = sol1; horder = 6; sizeexpr = 2
  adaptmesh2 "Level 2 Refined Mesh 2"
    size: MeshSizeDefault | hmax = 0.134; hmin = 6.0E-4; hcurve = 0.3; hgrad = 1.3
    copy1: Copy | counter = 1; mesh = adaptmesh1
    adap1: Adapt on entire geometry | solution = sol3; horder = 6; sizeexpr = 2

Studies
  std1 "Study 1"
    stat: Stationary | errestandadap = adaption

Solver configurations
  sol1 "Solution 1" (study std1)
    v1: Variables "Dependent Variables 1"
    s1: Stationary "Stationary Solver 1"
      dDef: Direct
      eeDef: ErrorEstimation
      adDef: Adaption "Adaptive Mesh Refinement"
      fc1: FullyCoupled | linsolver = dDef
  sol2 "Level 2 Refined Solution 2" (study std1)
  sol3 "Level 1 Refined Solution 3" (study std1)

Datasets
  dset1: Solution | solution = sol1
  dset2: Solution | solution = sol2
  dset3: Solution | solution = sol3
  cln1: CutLine2D | data = dset2; genpoints = {{0.02, 0}, {1, 0}}

Derived values
  int1: IntSurface "Surface Integration 1" on domains 1 | data = dset2; table = tbl1; expr = u

Tables
  tbl1: Table
    // Surface Integration 1 (u)
    Dependent variable u (m^2) | Dependent variable u (m^2) | Dependent variable u (m^2) | Dependent variable u (m^2) | Dependent variable u (m^2)
    0.25 | 0.25 | 0.25 | 0.25 | 0.25

Plots
  pg1: PlotGroup2D "2D Plot Group 1" | data = dset2
    surf1: Surface | expr = u
      hght1: Height "Height Expression 1" | expr = u
  pg2: PlotGroup1D "1D Plot Group 2" | data = cln1
    lngr1: LineGraph | expr = u+log(x^2)/(4*pi)